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/batch
! ANSYS input file written by Workbench version 2019 R1
! File used for geometry attach: C:\Users\Brandon\Desktop\glidestruct_files\dp0\SYS\DM\SYS.agdb
/title,glidestruct--Static Structural (A5)
/com,--- Data in consistent MKS units. See Solving Units in the help system for more information.
/units,MKS
/prep7
! Turn off shape checking because checks already performed inside WB mesher.
! See help system for more information.
SHPP,OFF,,NOWARN
etcon,set             ! allow ANSYS to choose best KEYOP's for 180x elements
/com,*********** Nodes for the whole assembly ***********
nblock,3,,233
(1i9,3e20.9e3)
        1     1.705263158E-01     3.360000000E-02     0.000000000E+00
        2     0.000000000E+00     3.360000000E-02     0.000000000E+00
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-1
/com,*********** Elements for Body 1 "Line Body" ***********
et,1,188
keyo,1,3,2
eblock,19,solid,,37
(19i9)
        1        1        1        1        0        0        0        0        3        0       67      138      140      176
        1        1        1        1        0        0        0        0        3        0       68      140      141      177
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-1
/com,*********** Elements for Body 2 "Line Body" ***********
et,2,188
keyo,2,3,2
eblock,19,solid,,8
(19i9)
        2        2        2        2        0        0        0        0        3        0       31       63       65       72
        2        2        2        2        0        0        0        0        3        0       32       65       66       73
        2        2        2        2        0        0        0        0        3        0       33       66       67       74
        2        2        2        2        0        0        0        0        3        0       34       67       68       75
        2        2        2        2        0        0        0        0        3        0       35       68       69       76
        2        2        2        2        0        0        0        0        3        0       36       69       70       77
        2        2        2        2        0        0        0        0        3        0       37       70       71       78
        2        2        2        2        0        0        0        0        3        0       38       71       64       79
-1
/com,*********** Elements for Body 3 "Line Body" ***********
et,3,188
keyo,3,3,2
eblock,19,solid,,11
(19i9)
        3        3        3        3        0        0        0        0        3        0       56      115      117      127
        3        3        3        3        0        0        0        0        3        0       57      117      118      128
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-1
/com,*********** Elements for Body 4 "Line Body" ***********
et,4,188
keyo,4,3,2
eblock,19,solid,,14
(19i9)
        4        4        4        4        0        0        0        0        3        0       17       34       36       49
        4        4        4        4        0        0        0        0        3        0       18       36       37       50
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-1
/com,*********** Elements for Body 5 "Line Body" ***********
et,5,188
keyo,5,3,2
eblock,19,solid,,16
(19i9)
        5        5        5        5        0        0        0        0        3        0        1        1        3       18
        5        5        5        5        0        0        0        0        3        0        2        3        4       19
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-1
/com,*********** Elements for Body 6 "Line Body" ***********
et,6,188
keyo,6,3,2
eblock,19,solid,,17
(19i9)
        6        6        6        6        0        0        0        0        3        0       39       80       82       98
        6        6        6        6        0        0        0        0        3        0       40       82       83       99
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-1
/com,*********** Send User Defined Coordinate System(s) ***********
csys,0
toffst,273.15,  ! Temperature offset from absolute zero
/com,*********** Set Reference Temperature ***********
tref,22.
/com,*********** Send Materials ***********
Temperature = 'TEMP' ! Temperature
MP,DENS,1,7850,	! kg m^-3
MP,ALPX,1,1.2e-05,	! C^-1
MP,C,1,434,	! J kg^-1 C^-1
MP,KXX,1,60.5,	! W m^-1 C^-1
MP,RSVX,1,1.7e-07,	! kg m^3 A^-2 s^-3
MP,EX,1,200000000000,	! Pa
MP,NUXY,1,0.3,
MP,MURX,1,10000,

Temperature = 'TEMP' ! Temperature
MP,DENS,2,7850,	! kg m^-3
MP,ALPX,2,1.2e-05,	! C^-1
MP,C,2,434,	! J kg^-1 C^-1
MP,KXX,2,60.5,	! W m^-1 C^-1
MP,RSVX,2,1.7e-07,	! kg m^3 A^-2 s^-3
MP,EX,2,200000000000,	! Pa
MP,NUXY,2,0.3,
MP,MURX,2,10000,

Temperature = 'TEMP' ! Temperature
MP,DENS,3,7850,	! kg m^-3
MP,ALPX,3,1.2e-05,	! C^-1
MP,C,3,434,	! J kg^-1 C^-1
MP,KXX,3,60.5,	! W m^-1 C^-1
MP,RSVX,3,1.7e-07,	! kg m^3 A^-2 s^-3
MP,EX,3,200000000000,	! Pa
MP,NUXY,3,0.3,
MP,MURX,3,10000,

Temperature = 'TEMP' ! Temperature
MP,DENS,4,7850,	! kg m^-3
MP,ALPX,4,1.2e-05,	! C^-1
MP,C,4,434,	! J kg^-1 C^-1
MP,KXX,4,60.5,	! W m^-1 C^-1
MP,RSVX,4,1.7e-07,	! kg m^3 A^-2 s^-3
MP,EX,4,200000000000,	! Pa
MP,NUXY,4,0.3,
MP,MURX,4,10000,

Temperature = 'TEMP' ! Temperature
MP,DENS,5,7850,	! kg m^-3
MP,ALPX,5,1.2e-05,	! C^-1
MP,C,5,434,	! J kg^-1 C^-1
MP,KXX,5,60.5,	! W m^-1 C^-1
MP,RSVX,5,1.7e-07,	! kg m^3 A^-2 s^-3
MP,EX,5,200000000000,	! Pa
MP,NUXY,5,0.3,
MP,MURX,5,10000,

Temperature = 'TEMP' ! Temperature
MP,DENS,6,7850,	! kg m^-3
MP,ALPX,6,1.2e-05,	! C^-1
MP,C,6,434,	! J kg^-1 C^-1
MP,KXX,6,60.5,	! W m^-1 C^-1
MP,RSVX,6,1.7e-07,	! kg m^3 A^-2 s^-3
MP,EX,6,200000000000,	! Pa
MP,NUXY,6,0.3,
MP,MURX,6,10000,

/com,*********** Send Beam Properties ***********
SECTYPE,1,BEAM,CSOL
SECDATA,1.e-003
secoffset,cent

SECTYPE,2,BEAM,CSOL
SECDATA,1.e-003
secoffset,cent

SECTYPE,3,BEAM,CSOL
SECDATA,1.e-003
secoffset,cent

SECTYPE,4,BEAM,CSOL
SECDATA,1.43e-003
secoffset,cent

SECTYPE,5,BEAM,CSOL
SECDATA,1.37e-003
secoffset,cent

SECTYPE,6,BEAM,CSOL
SECDATA,1.46e-003
secoffset,cent

!************************* Model Summary ********************
!Line Body,	Structural Steel,	matid,	1
!Line Body,	Structural Steel,	matid,	2
!Line Body,	Structural Steel,	matid,	3
!Line Body,	Structural Steel,	matid,	4
!Line Body,	Structural Steel,	matid,	5
!Line Body,	Structural Steel,	matid,	6
!************************* End Model Summary ********************
/com,*********** Create Contact "Bonded - Line Body To Line Body" ***********
*set,tid,8
*set,cid,7
r,tid
r,cid
et,tid,170
et,cid,177
tshape,para
eblock,10,,,16
(15i9)
      104        8        8        8        0      138      140
      105        8        8        8        0      140      141
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-1
eblock,10,,,16
(15i9)
      120        7        7        7        0      138      140
      121        7        7        7        0      140      141
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-1
eblock,10,,,8
(15i9)
      136        7        8        7        0       63       65
      137        7        8        7        0       65       66
      138        7        8        7        0       66       67
      139        7        8        7        0       67       68
      140        7        8        7        0       68       69
      141        7        8        7        0       69       70
      142        7        8        7        0       70       71
      143        7        8        7        0       71       64
-1
eblock,10,,,8
(15i9)
      144        8        7        8        0       63       65
      145        8        7        8        0       65       66
      146        8        7        8        0       66       67
      147        8        7        8        0       67       68
      148        8        7        8        0       68       69
      149        8        7        8        0       69       70
      150        8        7        8        0       70       71
      151        8        7        8        0       71       64
-1
tshape
esel,s,type,,cid
esel,r,real,,cid
*get,_elow,elem,0,num,min
enorm,_elow,,,,,NOWARN       ! enorm in case the edges are not aligned. don't issues warnings
esel,s,type,,tid
esel,r,real,,cid
*get,_elow,elem,0,num,min
enorm,_elow,,,,,NOWARN       ! enorm in case the edges are not aligned. don't issues warnings
esel,s,type,,cid
esel,r,real,,tid
*get,_elow,elem,0,num,min
enorm,_elow,,,,,NOWARN       ! enorm in case the edges are not aligned. don't issues warnings
esel,s,type,,tid
esel,r,real,,tid
*get,_elow,elem,0,num,min
enorm,_elow,,,,,NOWARN       ! enorm in case the edges are not aligned. don't issues warnings
keyo,cid,3,2               ! beam-beam contact, include all possible contact
keyo,cid,14,1              ! beam-beam contact, allow up to four target segments
keyo,cid,8,2               ! auto create asymmetric contact (from Program Controlled setting)
keyo,cid,10,0              ! adjust contact stiffness each NR iteration (from Program Controlled setting)
keyo,cid,12,5              ! bonded always
keyo,cid,18,1              ! small sliding turned on by application
keyo,cid,2,0               ! augmented Lagrange (from Program Controlled setting)
keyo,tid,5,2               ! Constrain both translation and rotation
keyo,cid,9,1               ! ignore initial gaps/penetration
keyo,cid,7,0               ! No Prediction
rmod,tid,3,10.      ! FKN
rmod,tid,5,0.       ! ICONT
rmod,tid,6,0.       ! PINB
rmod,tid,10,0.      ! CNOF
rmod,tid,12,0.      ! FKT
rmod,tid,36,52      ! WB DSID
rmod,cid,3,10.      ! FKN
rmod,cid,5,0.       ! ICONT
rmod,cid,6,0.       ! PINB
rmod,cid,10,0.      ! CNOF
rmod,cid,12,0.      ! FKT
rmod,cid,36,52      ! WB DSID
/com,*********** Create Contact "Bonded - Line Body To Line Body" ***********
*set,tid,10
*set,cid,9
r,tid
r,cid
et,tid,170
et,cid,177
tshape,para
eblock,10,,,16
(15i9)
      152       10       10       10        0      138      140
      153       10       10       10        0      140      141
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-1
eblock,10,,,16
(15i9)
      168        9        9        9        0      138      140
      169        9        9        9        0      140      141
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-1
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eblock,10,,,11
(15i9)
      195       10        9       10        0      115      117
      196       10        9       10        0      117      118
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-1
tshape
esel,s,type,,cid
esel,r,real,,cid
*get,_elow,elem,0,num,min
enorm,_elow,,,,,NOWARN       ! enorm in case the edges are not aligned. don't issues warnings
esel,s,type,,tid
esel,r,real,,cid
*get,_elow,elem,0,num,min
enorm,_elow,,,,,NOWARN       ! enorm in case the edges are not aligned. don't issues warnings
esel,s,type,,cid
esel,r,real,,tid
*get,_elow,elem,0,num,min
enorm,_elow,,,,,NOWARN       ! enorm in case the edges are not aligned. don't issues warnings
esel,s,type,,tid
esel,r,real,,tid
*get,_elow,elem,0,num,min
enorm,_elow,,,,,NOWARN       ! enorm in case the edges are not aligned. don't issues warnings
keyo,cid,3,2               ! beam-beam contact, include all possible contact
keyo,cid,14,1              ! beam-beam contact, allow up to four target segments
keyo,cid,8,2               ! auto create asymmetric contact (from Program Controlled setting)
keyo,cid,10,0              ! adjust contact stiffness each NR iteration (from Program Controlled setting)
keyo,cid,12,5              ! bonded always
keyo,cid,18,1              ! small sliding turned on by application
keyo,cid,2,0               ! augmented Lagrange (from Program Controlled setting)
keyo,tid,5,2               ! Constrain both translation and rotation
keyo,cid,9,1               ! ignore initial gaps/penetration
keyo,cid,7,0               ! No Prediction
rmod,tid,3,10.      ! FKN
rmod,tid,5,0.       ! ICONT
rmod,tid,6,0.       ! PINB
rmod,tid,10,0.      ! CNOF
rmod,tid,12,0.      ! FKT
rmod,tid,36,55      ! WB DSID
rmod,cid,3,10.      ! FKN
rmod,cid,5,0.       ! ICONT
rmod,cid,6,0.       ! PINB
rmod,cid,10,0.      ! CNOF
rmod,cid,12,0.      ! FKT
rmod,cid,36,55      ! WB DSID
/com,*********** Create Contact "Bonded - Line Body To Line Body" ***********
*set,tid,12
*set,cid,11
r,tid
r,cid
et,tid,170
et,cid,177
tshape,para
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eblock,10,,,14
(15i9)
      252       12       11       12        0       34       36
      253       12       11       12        0       36       37
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-1
tshape
esel,s,type,,cid
esel,r,real,,cid
*get,_elow,elem,0,num,min
enorm,_elow,,,,,NOWARN       ! enorm in case the edges are not aligned. don't issues warnings
esel,s,type,,tid
esel,r,real,,cid
*get,_elow,elem,0,num,min
enorm,_elow,,,,,NOWARN       ! enorm in case the edges are not aligned. don't issues warnings
esel,s,type,,cid
esel,r,real,,tid
*get,_elow,elem,0,num,min
enorm,_elow,,,,,NOWARN       ! enorm in case the edges are not aligned. don't issues warnings
esel,s,type,,tid
esel,r,real,,tid
*get,_elow,elem,0,num,min
enorm,_elow,,,,,NOWARN       ! enorm in case the edges are not aligned. don't issues warnings
keyo,cid,3,2               ! beam-beam contact, include all possible contact
keyo,cid,14,1              ! beam-beam contact, allow up to four target segments
keyo,cid,8,2               ! auto create asymmetric contact (from Program Controlled setting)
keyo,cid,10,0              ! adjust contact stiffness each NR iteration (from Program Controlled setting)
keyo,cid,12,5              ! bonded always
keyo,cid,18,1              ! small sliding turned on by application
keyo,cid,2,0               ! augmented Lagrange (from Program Controlled setting)
keyo,tid,5,2               ! Constrain both translation and rotation
keyo,cid,9,1               ! ignore initial gaps/penetration
keyo,cid,7,0               ! No Prediction
rmod,tid,3,10.      ! FKN
rmod,tid,5,0.       ! ICONT
rmod,tid,6,0.       ! PINB
rmod,tid,10,0.      ! CNOF
rmod,tid,12,0.      ! FKT
rmod,tid,36,58      ! WB DSID
rmod,cid,3,10.      ! FKN
rmod,cid,5,0.       ! ICONT
rmod,cid,6,0.       ! PINB
rmod,cid,10,0.      ! CNOF
rmod,cid,12,0.      ! FKT
rmod,cid,36,58      ! WB DSID
/com,*********** Create Contact "Bonded - Line Body To Line Body" ***********
*set,tid,14
*set,cid,13
r,tid
r,cid
et,tid,170
et,cid,177
tshape,para
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eblock,10,,,16
(15i9)
      314       14       13       14        0        1        3
      315       14       13       14        0        3        4
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-1
tshape
esel,s,type,,cid
esel,r,real,,cid
*get,_elow,elem,0,num,min
enorm,_elow,,,,,NOWARN       ! enorm in case the edges are not aligned. don't issues warnings
esel,s,type,,tid
esel,r,real,,cid
*get,_elow,elem,0,num,min
enorm,_elow,,,,,NOWARN       ! enorm in case the edges are not aligned. don't issues warnings
esel,s,type,,cid
esel,r,real,,tid
*get,_elow,elem,0,num,min
enorm,_elow,,,,,NOWARN       ! enorm in case the edges are not aligned. don't issues warnings
esel,s,type,,tid
esel,r,real,,tid
*get,_elow,elem,0,num,min
enorm,_elow,,,,,NOWARN       ! enorm in case the edges are not aligned. don't issues warnings
keyo,cid,3,2               ! beam-beam contact, include all possible contact
keyo,cid,14,1              ! beam-beam contact, allow up to four target segments
keyo,cid,8,2               ! auto create asymmetric contact (from Program Controlled setting)
keyo,cid,10,0              ! adjust contact stiffness each NR iteration (from Program Controlled setting)
keyo,cid,12,5              ! bonded always
keyo,cid,18,1              ! small sliding turned on by application
keyo,cid,2,0               ! augmented Lagrange (from Program Controlled setting)
keyo,tid,5,2               ! Constrain both translation and rotation
keyo,cid,9,1               ! ignore initial gaps/penetration
keyo,cid,7,0               ! No Prediction
rmod,tid,3,10.      ! FKN
rmod,tid,5,0.       ! ICONT
rmod,tid,6,0.       ! PINB
rmod,tid,10,0.      ! CNOF
rmod,tid,12,0.      ! FKT
rmod,tid,36,61      ! WB DSID
rmod,cid,3,10.      ! FKN
rmod,cid,5,0.       ! ICONT
rmod,cid,6,0.       ! PINB
rmod,cid,10,0.      ! CNOF
rmod,cid,12,0.      ! FKT
rmod,cid,36,61      ! WB DSID
/com,*********** Create Contact "Bonded - Line Body To Line Body" ***********
*set,tid,16
*set,cid,15
r,tid
r,cid
et,tid,170
et,cid,177
tshape,para
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eblock,10,,,8
(15i9)
      380       16       15       16        0       63       65
      381       16       15       16        0       65       66
      382       16       15       16        0       66       67
      383       16       15       16        0       67       68
      384       16       15       16        0       68       69
      385       16       15       16        0       69       70
      386       16       15       16        0       70       71
      387       16       15       16        0       71       64
-1
tshape
esel,s,type,,cid
esel,r,real,,cid
*get,_elow,elem,0,num,min
enorm,_elow,,,,,NOWARN       ! enorm in case the edges are not aligned. don't issues warnings
esel,s,type,,tid
esel,r,real,,cid
*get,_elow,elem,0,num,min
enorm,_elow,,,,,NOWARN       ! enorm in case the edges are not aligned. don't issues warnings
esel,s,type,,cid
esel,r,real,,tid
*get,_elow,elem,0,num,min
enorm,_elow,,,,,NOWARN       ! enorm in case the edges are not aligned. don't issues warnings
esel,s,type,,tid
esel,r,real,,tid
*get,_elow,elem,0,num,min
enorm,_elow,,,,,NOWARN       ! enorm in case the edges are not aligned. don't issues warnings
keyo,cid,3,2               ! beam-beam contact, include all possible contact
keyo,cid,14,1              ! beam-beam contact, allow up to four target segments
keyo,cid,8,2               ! auto create asymmetric contact (from Program Controlled setting)
keyo,cid,10,0              ! adjust contact stiffness each NR iteration (from Program Controlled setting)
keyo,cid,12,5              ! bonded always
keyo,cid,18,1              ! small sliding turned on by application
keyo,cid,2,0               ! augmented Lagrange (from Program Controlled setting)
keyo,tid,5,2               ! Constrain both translation and rotation
keyo,cid,9,1               ! ignore initial gaps/penetration
keyo,cid,7,0               ! No Prediction
rmod,tid,3,10.      ! FKN
rmod,tid,5,0.       ! ICONT
rmod,tid,6,0.       ! PINB
rmod,tid,10,0.      ! CNOF
rmod,tid,12,0.      ! FKT
rmod,tid,36,64      ! WB DSID
rmod,cid,3,10.      ! FKN
rmod,cid,5,0.       ! ICONT
rmod,cid,6,0.       ! PINB
rmod,cid,10,0.      ! CNOF
rmod,cid,12,0.      ! FKT
rmod,cid,36,64      ! WB DSID
/com,*********** Create Contact "Bonded - Line Body To Line Body" ***********
*set,tid,18
*set,cid,17
r,tid
r,cid
et,tid,170
et,cid,177
tshape,para
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eblock,10,,,11
(15i9)
      441       18       17       18        0      115      117
      442       18       17       18        0      117      118
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-1
tshape
esel,s,type,,cid
esel,r,real,,cid
*get,_elow,elem,0,num,min
enorm,_elow,,,,,NOWARN       ! enorm in case the edges are not aligned. don't issues warnings
esel,s,type,,tid
esel,r,real,,cid
*get,_elow,elem,0,num,min
enorm,_elow,,,,,NOWARN       ! enorm in case the edges are not aligned. don't issues warnings
esel,s,type,,cid
esel,r,real,,tid
*get,_elow,elem,0,num,min
enorm,_elow,,,,,NOWARN       ! enorm in case the edges are not aligned. don't issues warnings
esel,s,type,,tid
esel,r,real,,tid
*get,_elow,elem,0,num,min
enorm,_elow,,,,,NOWARN       ! enorm in case the edges are not aligned. don't issues warnings
keyo,cid,3,2               ! beam-beam contact, include all possible contact
keyo,cid,14,1              ! beam-beam contact, allow up to four target segments
keyo,cid,8,2               ! auto create asymmetric contact (from Program Controlled setting)
keyo,cid,10,0              ! adjust contact stiffness each NR iteration (from Program Controlled setting)
keyo,cid,12,5              ! bonded always
keyo,cid,18,1              ! small sliding turned on by application
keyo,cid,2,0               ! augmented Lagrange (from Program Controlled setting)
keyo,tid,5,2               ! Constrain both translation and rotation
keyo,cid,9,1               ! ignore initial gaps/penetration
keyo,cid,7,0               ! No Prediction
rmod,tid,3,10.      ! FKN
rmod,tid,5,0.       ! ICONT
rmod,tid,6,0.       ! PINB
rmod,tid,10,0.      ! CNOF
rmod,tid,12,0.      ! FKT
rmod,tid,36,67      ! WB DSID
rmod,cid,3,10.      ! FKN
rmod,cid,5,0.       ! ICONT
rmod,cid,6,0.       ! PINB
rmod,cid,10,0.      ! CNOF
rmod,cid,12,0.      ! FKT
rmod,cid,36,67      ! WB DSID
/com,*********** Create Contact "Bonded - Line Body To Line Body" ***********
*set,tid,20
*set,cid,19
r,tid
r,cid
et,tid,170
et,cid,177
tshape,para
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eblock,10,,,14
(15i9)
      508       20       19       20        0       34       36
      509       20       19       20        0       36       37
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-1
tshape
esel,s,type,,cid
esel,r,real,,cid
*get,_elow,elem,0,num,min
enorm,_elow,,,,,NOWARN       ! enorm in case the edges are not aligned. don't issues warnings
esel,s,type,,tid
esel,r,real,,cid
*get,_elow,elem,0,num,min
enorm,_elow,,,,,NOWARN       ! enorm in case the edges are not aligned. don't issues warnings
esel,s,type,,cid
esel,r,real,,tid
*get,_elow,elem,0,num,min
enorm,_elow,,,,,NOWARN       ! enorm in case the edges are not aligned. don't issues warnings
esel,s,type,,tid
esel,r,real,,tid
*get,_elow,elem,0,num,min
enorm,_elow,,,,,NOWARN       ! enorm in case the edges are not aligned. don't issues warnings
keyo,cid,3,2               ! beam-beam contact, include all possible contact
keyo,cid,14,1              ! beam-beam contact, allow up to four target segments
keyo,cid,8,2               ! auto create asymmetric contact (from Program Controlled setting)
keyo,cid,10,0              ! adjust contact stiffness each NR iteration (from Program Controlled setting)
keyo,cid,12,5              ! bonded always
keyo,cid,18,1              ! small sliding turned on by application
keyo,cid,2,0               ! augmented Lagrange (from Program Controlled setting)
keyo,tid,5,2               ! Constrain both translation and rotation
keyo,cid,9,1               ! ignore initial gaps/penetration
keyo,cid,7,0               ! No Prediction
rmod,tid,3,10.      ! FKN
rmod,tid,5,0.       ! ICONT
rmod,tid,6,0.       ! PINB
rmod,tid,10,0.      ! CNOF
rmod,tid,12,0.      ! FKT
rmod,tid,36,70      ! WB DSID
rmod,cid,3,10.      ! FKN
rmod,cid,5,0.       ! ICONT
rmod,cid,6,0.       ! PINB
rmod,cid,10,0.      ! CNOF
rmod,cid,12,0.      ! FKT
rmod,cid,36,70      ! WB DSID
/com,*********** Create Contact "Bonded - Line Body To Line Body" ***********
*set,tid,22
*set,cid,21
r,tid
r,cid
et,tid,170
et,cid,177
tshape,para
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eblock,10,,,16
(15i9)
      580       22       21       22        0        1        3
      581       22       21       22        0        3        4
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-1
tshape
esel,s,type,,cid
esel,r,real,,cid
*get,_elow,elem,0,num,min
enorm,_elow,,,,,NOWARN       ! enorm in case the edges are not aligned. don't issues warnings
esel,s,type,,tid
esel,r,real,,cid
*get,_elow,elem,0,num,min
enorm,_elow,,,,,NOWARN       ! enorm in case the edges are not aligned. don't issues warnings
esel,s,type,,cid
esel,r,real,,tid
*get,_elow,elem,0,num,min
enorm,_elow,,,,,NOWARN       ! enorm in case the edges are not aligned. don't issues warnings
esel,s,type,,tid
esel,r,real,,tid
*get,_elow,elem,0,num,min
enorm,_elow,,,,,NOWARN       ! enorm in case the edges are not aligned. don't issues warnings
keyo,cid,3,2               ! beam-beam contact, include all possible contact
keyo,cid,14,1              ! beam-beam contact, allow up to four target segments
keyo,cid,8,2               ! auto create asymmetric contact (from Program Controlled setting)
keyo,cid,10,0              ! adjust contact stiffness each NR iteration (from Program Controlled setting)
keyo,cid,12,5              ! bonded always
keyo,cid,18,1              ! small sliding turned on by application
keyo,cid,2,0               ! augmented Lagrange (from Program Controlled setting)
keyo,tid,5,2               ! Constrain both translation and rotation
keyo,cid,9,1               ! ignore initial gaps/penetration
keyo,cid,7,0               ! No Prediction
rmod,tid,3,10.      ! FKN
rmod,tid,5,0.       ! ICONT
rmod,tid,6,0.       ! PINB
rmod,tid,10,0.      ! CNOF
rmod,tid,12,0.      ! FKT
rmod,tid,36,73      ! WB DSID
rmod,cid,3,10.      ! FKN
rmod,cid,5,0.       ! ICONT
rmod,cid,6,0.       ! PINB
rmod,cid,10,0.      ! CNOF
rmod,cid,12,0.      ! FKT
rmod,cid,36,73      ! WB DSID
/com,*********** Create Contact "Bonded - Line Body To Line Body" ***********
*set,tid,24
*set,cid,23
r,tid
r,cid
et,tid,170
et,cid,177
tshape,para
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eblock,10,,,17
(15i9)
      645       24       23       24        0       80       82
      646       24       23       24        0       82       83
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-1
tshape
esel,s,type,,cid
esel,r,real,,cid
*get,_elow,elem,0,num,min
enorm,_elow,,,,,NOWARN       ! enorm in case the edges are not aligned. don't issues warnings
esel,s,type,,tid
esel,r,real,,cid
*get,_elow,elem,0,num,min
enorm,_elow,,,,,NOWARN       ! enorm in case the edges are not aligned. don't issues warnings
esel,s,type,,cid
esel,r,real,,tid
*get,_elow,elem,0,num,min
enorm,_elow,,,,,NOWARN       ! enorm in case the edges are not aligned. don't issues warnings
esel,s,type,,tid
esel,r,real,,tid
*get,_elow,elem,0,num,min
enorm,_elow,,,,,NOWARN       ! enorm in case the edges are not aligned. don't issues warnings
keyo,cid,3,2               ! beam-beam contact, include all possible contact
keyo,cid,14,1              ! beam-beam contact, allow up to four target segments
keyo,cid,8,2               ! auto create asymmetric contact (from Program Controlled setting)
keyo,cid,10,0              ! adjust contact stiffness each NR iteration (from Program Controlled setting)
keyo,cid,12,5              ! bonded always
keyo,cid,18,1              ! small sliding turned on by application
keyo,cid,2,0               ! augmented Lagrange (from Program Controlled setting)
keyo,tid,5,2               ! Constrain both translation and rotation
keyo,cid,9,1               ! ignore initial gaps/penetration
keyo,cid,7,0               ! No Prediction
rmod,tid,3,10.      ! FKN
rmod,tid,5,0.       ! ICONT
rmod,tid,6,0.       ! PINB
rmod,tid,10,0.      ! CNOF
rmod,tid,12,0.      ! FKT
rmod,tid,36,97      ! WB DSID
rmod,cid,3,10.      ! FKN
rmod,cid,5,0.       ! ICONT
rmod,cid,6,0.       ! PINB
rmod,cid,10,0.      ! CNOF
rmod,cid,12,0.      ! FKT
rmod,cid,36,97      ! WB DSID
/com,*********** Create Contact "Bonded - Line Body To Line Body" ***********
*set,tid,26
*set,cid,25
r,tid
r,cid
et,tid,170
et,cid,177
tshape,para
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eblock,10,,,17
(15i9)
      721       26       25       26        0       80       82
      722       26       25       26        0       82       83
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-1
tshape
esel,s,type,,cid
esel,r,real,,cid
*get,_elow,elem,0,num,min
enorm,_elow,,,,,NOWARN       ! enorm in case the edges are not aligned. don't issues warnings
esel,s,type,,tid
esel,r,real,,cid
*get,_elow,elem,0,num,min
enorm,_elow,,,,,NOWARN       ! enorm in case the edges are not aligned. don't issues warnings
esel,s,type,,cid
esel,r,real,,tid
*get,_elow,elem,0,num,min
enorm,_elow,,,,,NOWARN       ! enorm in case the edges are not aligned. don't issues warnings
esel,s,type,,tid
esel,r,real,,tid
*get,_elow,elem,0,num,min
enorm,_elow,,,,,NOWARN       ! enorm in case the edges are not aligned. don't issues warnings
keyo,cid,3,2               ! beam-beam contact, include all possible contact
keyo,cid,14,1              ! beam-beam contact, allow up to four target segments
keyo,cid,8,2               ! auto create asymmetric contact (from Program Controlled setting)
keyo,cid,10,0              ! adjust contact stiffness each NR iteration (from Program Controlled setting)
keyo,cid,12,5              ! bonded always
keyo,cid,18,1              ! small sliding turned on by application
keyo,cid,2,0               ! augmented Lagrange (from Program Controlled setting)
keyo,tid,5,2               ! Constrain both translation and rotation
keyo,cid,9,1               ! ignore initial gaps/penetration
keyo,cid,7,0               ! No Prediction
rmod,tid,3,10.      ! FKN
rmod,tid,5,0.       ! ICONT
rmod,tid,6,0.       ! PINB
rmod,tid,10,0.      ! CNOF
rmod,tid,12,0.      ! FKT
rmod,tid,36,100     ! WB DSID
rmod,cid,3,10.      ! FKN
rmod,cid,5,0.       ! ICONT
rmod,cid,6,0.       ! PINB
rmod,cid,10,0.      ! CNOF
rmod,cid,12,0.      ! FKT
rmod,cid,36,100     ! WB DSID
nsel,all
esel,all
/com,*********** Fixed Supports ***********
CMBLOCK,_FIXEDSU,NODE,       17
(8i10)
       138       139       140       141       142       143       144       145
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cmsel,s,_FIXEDSU
d,all,all
nsel,all
/com,*********** Define Force Using Surface Effect Elements ***********
local,12,0,0.,0.,0.,0.,0.,0.
csys,0
et,27,156
keyop,27,5,1   ! No orientation node
eblock,10,,,21
(15i9)
      738       27       27       27       12      155      156
      739       27       27       27       12      156      157
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-1
esel,s,type,,27
keyop,27,2,1                ! Apply load in local coordinate system
keyop,27,7,1                ! Use original area so load is constant in large deformation
esel,all
fini
/com,****************************************************************************
/com,*************************    SOLUTION       ********************************
/com,****************************************************************************
/solu
antype,0                   ! static analysis
eqsl,sparse,,,,,1
cntr,print,1               ! print out contact info and also make no initial contact an error
dmpoption,emat,no             ! Don't combine emat file for DANSYS
dmpoption,esav,no             ! Don't combine esav file for DANSYS
nldiag,cont,iter           ! print out contact info each equilibrium iteration
rescontrol,,none                 ! Do not keep any restart files
/com,****************************************************
/com,******************* SOLVE FOR LS 1 OF 1 ****************
esel,s,type,,27
nsle
sfe,all,1,pres,1,0.
sfe,all,2,pres,1,0.
sfe,all,3,pres,1,-164.859454577034
nsel,all
esel,all
nsub,1,1,1
time,1.
outres,erase
outres,all,none
outres,nsol,all,
outres,rsol,all
outres,strs,all,
outres,eangl,all
outres,fmag,all
outres,curd,all
outres,nldat,all
outres,eheat,all
outres,etmp,all
outres,srfs,all
outres,cont,all
outres,bkstr,all
outres,veng,all
outres,epel,all,
outres,eppl,all,
esel,s,type,,1
esel,a,type,,2,6
cm,_elmisc,elem
esel,all
outres,misc,all,_elmisc
stabilize,off                   ! Stabilization turned OFF by user
! *********** WB SOLVE COMMAND ***********
! check interactive state
*get,ANSINTER_,active,,int
*if,ANSINTER_,ne,0,then
/eof
*endif
solve
/com *************** Write FE CONNECTORS *********
CEWRITE,file,ce,,INTE
/com,****************************************************
/com,*************** FINISHED SOLVE FOR LS 1 *************
/post1
fini
